//This file creates the environment around the human
//It creates the force plates and add the measure load to them

AnyFixedRefFrame GlobalRef ={
  Origin={0,0,0};
  AnyDrawRefFrame drw={ScaleXYZ=0.4*{1,1,1};};
};


#ifdef IncludeLegTDModel
#ifdef INCLUDE_FP1
ForcePlateType2AutoDetection ForcePlate1 (
PlateName = Plate1,
Folder = Main.ModelSetup.DynamicDataSet,
Limb1 = ..HumanModel.BodyModel.Left.Leg.Seg.Foot,
Limb2 = ..HumanModel.BodyModel.Right.Leg.Seg.Foot,
VerticalDirection ="Z",
HeightTolerance=0.05,
VelThreshold=2.2,
No=0,
Fx=Main.ModelSetup.DynamicDataSet.Analog.DataFiltered.Fx1,
Fy=Main.ModelSetup.DynamicDataSet.Analog.DataFiltered.Fy1,
Fz=Main.ModelSetup.DynamicDataSet.Analog.DataFiltered.Fz1,
Mx=Main.ModelSetup.DynamicDataSet.Analog.DataFiltered.Mx1,
My=Main.ModelSetup.DynamicDataSet.Analog.DataFiltered.My1,
Mz=Main.ModelSetup.DynamicDataSet.Analog.DataFiltered.Mz1,
FootPresent = IncludeLegTDModel)
= {
};
#endif
#ifdef INCLUDE_FP1_RightFootContact
ForcePlateType2 ForcePlate1 (
PlateName = Plate1,
Folder = Main.ModelSetup.DynamicDataSet,
Limb = ..HumanModel.BodyModel.Right.Leg.Seg.Foot,
No=0,
Fx=Main.ModelSetup.DynamicDataSet.Analog.DataFiltered.Fx1,
Fy=Main.ModelSetup.DynamicDataSet.Analog.DataFiltered.Fy1,
Fz=Main.ModelSetup.DynamicDataSet.Analog.DataFiltered.Fz1,
Mx=Main.ModelSetup.DynamicDataSet.Analog.DataFiltered.Mx1,
My=Main.ModelSetup.DynamicDataSet.Analog.DataFiltered.My1,
Mz=Main.ModelSetup.DynamicDataSet.Analog.DataFiltered.Mz1
)
= {
};
#endif

#ifdef INCLUDE_FP1_LeftFootContact

ForcePlateType2 ForcePlate1 (
PlateName = Plate1,
Folder = Main.ModelSetup.DynamicDataSet,
Limb = ..HumanModel.BodyModel.Left.Leg.Seg.Foot,
No=0,
Fx=Main.ModelSetup.DynamicDataSet.Analog.DataFiltered.Fx1,
Fy=Main.ModelSetup.DynamicDataSet.Analog.DataFiltered.Fy1,
Fz=Main.ModelSetup.DynamicDataSet.Analog.DataFiltered.Fz1,
Mx=Main.ModelSetup.DynamicDataSet.Analog.DataFiltered.Mx1,
My=Main.ModelSetup.DynamicDataSet.Analog.DataFiltered.My1,
Mz=Main.ModelSetup.DynamicDataSet.Analog.DataFiltered.Mz1
)
= {
};
#endif

#ifdef INCLUDE_FP2_RightFootContact
ForcePlateType2 ForcePlate2 (
PlateName = Plate2,
Folder = Main.ModelSetup.DynamicDataSet,
Limb = ..HumanModel.BodyModel.Right.Leg.Seg.Foot,
No=1,
Fx=Main.ModelSetup.DynamicDataSet.Analog.DataFiltered.Fx2,
Fy=Main.ModelSetup.DynamicDataSet.Analog.DataFiltered.Fy2,
Fz=Main.ModelSetup.DynamicDataSet.Analog.DataFiltered.Fz2,
Mx=Main.ModelSetup.DynamicDataSet.Analog.DataFiltered.Mx2,
My=Main.ModelSetup.DynamicDataSet.Analog.DataFiltered.My2,
Mz=Main.ModelSetup.DynamicDataSet.Analog.DataFiltered.Mz2
)
= {
};
#endif

#ifdef INCLUDE_FP2_LeftFootContact
ForcePlateType2 ForcePlate2 (
PlateName = Plate2,
Folder = Main.ModelSetup.DynamicDataSet,
Limb = ..HumanModel.BodyModel.Left.Leg.Seg.Foot,
No=1,
Fx=Main.ModelSetup.DynamicDataSet.Analog.DataFiltered.Fx2,
Fy=Main.ModelSetup.DynamicDataSet.Analog.DataFiltered.Fy2,
Fz=Main.ModelSetup.DynamicDataSet.Analog.DataFiltered.Fz2,
Mx=Main.ModelSetup.DynamicDataSet.Analog.DataFiltered.Mx2,
My=Main.ModelSetup.DynamicDataSet.Analog.DataFiltered.My2,
Mz=Main.ModelSetup.DynamicDataSet.Analog.DataFiltered.Mz2
)
= {
};
#endif

#ifdef INCLUDE_FP2
ForcePlateType2AutoDetection ForcePlate2 (
PlateName = Plate2,
Folder = Main.ModelSetup.DynamicDataSet,
Limb1 = ..HumanModel.BodyModel.Left.Leg.Seg.Foot,
Limb2 = ..HumanModel.BodyModel.Right.Leg.Seg.Foot,
VerticalDirection ="Z",
HeightTolerance=0.05,
VelThreshold=2.2,
No=1,
Fx=Main.ModelSetup.DynamicDataSet.Analog.DataFiltered.Fx2,
Fy=Main.ModelSetup.DynamicDataSet.Analog.DataFiltered.Fy2,
Fz=Main.ModelSetup.DynamicDataSet.Analog.DataFiltered.Fz2,
Mx=Main.ModelSetup.DynamicDataSet.Analog.DataFiltered.Mx2,
My=Main.ModelSetup.DynamicDataSet.Analog.DataFiltered.My2,
Mz=Main.ModelSetup.DynamicDataSet.Analog.DataFiltered.Mz2,
FootPresent = IncludeLegTDModel)
= {
};
#endif


#ifdef INCLUDE_FP3_LeftFootContact
ForcePlateType2 ForcePlate3 (
PlateName = Plate3,
Folder = Main.ModelSetup.DynamicDataSet,
Limb = ..HumanModel.BodyModel.Left.Leg.Seg.Foot,
No=2,
Fx=Main.ModelSetup.DynamicDataSet.Analog.DataFiltered.ForceFx3,
Fy=Main.ModelSetup.DynamicDataSet.Analog.DataFiltered.ForceFy3,
Fz=Main.ModelSetup.DynamicDataSet.Analog.DataFiltered.ForceFz3,
Mx=Main.ModelSetup.DynamicDataSet.Analog.DataFiltered.Mx3,
My=Main.ModelSetup.DynamicDataSet.Analog.DataFiltered.My3,
Mz=Main.ModelSetup.DynamicDataSet.Analog.DataFiltered.Mz3
)
= {
};
#endif

#ifdef INCLUDE_FP3_RightFootContact
ForcePlateType2 ForcePlate3 (
PlateName = Plate3,
Folder = Main.ModelSetup.DynamicDataSet,
Limb = ..HumanModel.BodyModel.Right.Leg.Seg.Foot,
No=2,
Fx=Main.ModelSetup.DynamicDataSet.Analog.DataFiltered.Fx3,
Fy=Main.ModelSetup.DynamicDataSet.Analog.DataFiltered.Fy3,
Fz=Main.ModelSetup.DynamicDataSet.Analog.DataFiltered.Fz3,
Mx=Main.ModelSetup.DynamicDataSet.Analog.DataFiltered.Mx3,
My=Main.ModelSetup.DynamicDataSet.Analog.DataFiltered.My3,
Mz=Main.ModelSetup.DynamicDataSet.Analog.DataFiltered.Mz3
)
= {
};
#endif


#endif
