AnyFolder GeneralSettings = {

AnyVar MuscleRecruitmentOrder = 3;

AnyString OutputFilename = "Results.txt";

AnyString OutputFilenameAnatomicalHipJointCenters = "ResultsAnatomicalHipJointCenters.txt";

AnyString OutputSepSign = " ";

AnyVec3 Gravity = {0.0,0.0,-9.82};

};
