//This file creates the environment around the human
//It creates the force plates and add the measure load to them

AnyFixedRefFrame GlobalRef =
{
  Origin={0,0,0};
  AnyRefNode Origo = {};
  AnyDrawRefFrame drw={ScaleXYZ=0.4*{1,1,1};};
}; // GlobalRef
