  AnyFolder &PelvisRef = ...HumanModel.BodyModel.Trunk.SegmentsLumbar.PelvisSeg;

#if RIGHT_LEG_TD == 1
  AnyFolder &RightThighRef = ...HumanModel.BodyModel.Right.Leg.Seg.Thigh;
  AnyFolder &RightShankRef = ...HumanModel.BodyModel.Right.Leg.Seg.Shank;
  AnyFolder &RightTalusRef = ...HumanModel.BodyModel.Right.Leg.Seg.Talus;
  AnyFolder &RightFootRef = ...HumanModel.BodyModel.Right.Leg.Seg.Foot;
#endif

#if LEFT_LEG_TD == 1
  AnyFolder &LeftThighRef = ...HumanModel.BodyModel.Left.Leg.Seg.Thigh;
  AnyFolder &LeftShankRef = ...HumanModel.BodyModel.Left.Leg.Seg.Shank;
  AnyFolder &LeftTalusRef = ...HumanModel.BodyModel.Left.Leg.Seg.Talus;
  AnyFolder &LeftFootRef = ...HumanModel.BodyModel.Left.Leg.Seg.Foot;
#endif

  // Insert driveNode in Pelvis Segment
  PelvisRef = {
        AnyRefNode DriveNode = {
          AnyVec3 HipJointMidPoint = (.Right.HipJoint.sRel + .Left.HipJoint.sRel)/2;
          sRel = 0.5* (.Scale(.MorphNodes.SourceLeftAsisMarker.sRel)+.Scale(.MorphNodes.SourceRightAsisMarker.sRel) );

          ARel = RotMat(sRel, HipJointMidPoint , .MorphNodes.SourcePSISMidPointMarker.sRel);
        };
  };

#if RIGHT_LEG_TD == 1
  RightThighRef = {
    AnyRefNode DriveNode = {

      sRel = .HipJoint.sRel;
      ARel = RotMat(.HipJoint.sRel,
                    .KneeJoint.sRel ,
                    .HipJoint.sRel + .KneeJoint.ARel'[2] );
    };

    AnyRefNode DriveNodeKnee = {
     sRel = .KneeJoint.sRel;
     ARel = RotMat(sRel,sRel+{0,0,1}*.KneeJoint.ARel', .HipJoint.sRel)
     * RotMat(90*pi/180,y);
//     AnyDrawRefFrame drw ={RGB={0,0,1};};

   };

  };

  RightShankRef = {
    AnyRefNode DriveNodeAnkle = {
      sRel = .AnkleJoint.sRel;
     ARel = .AnkleJoint.ARel;//RotMat(sRel,sRel+{0,0,1}*.AnkleJoint.ARel', .KneeJoint.sRel);
     //AnyDrawRefFrame drw ={};

    };

    AnyRefNode DriveNodeKnee = {
     sRel = .KneeJoint.sRel;
     ARel = RotMat(sRel,sRel+{0,0,1}*.KneeJoint.ARel', .AnkleJoint.sRel)
     * RotMat(90*pi/180,y)*RotMat(pi,z);
     //AnyDrawRefFrame drw ={RGB={1,0,0};};
   };
  };

  RightTalusRef = {
    AnyRefNode DriveNodeAnkle = {
     sRel = .AnkleJoint.sRel;
     ARel = .AnkleJoint.ARel;
     //ARel = RotMat(sRel,sRel+{0,0,1}*.AnkleJoint.ARel', ..RightFootRef.MorphNodes.SourceToeMarker.sRel);
     AnyDrawRefFrame refFrame = { Visible = Off; RGB={0,1,0}; ScaleXYZ = {0.1, 0.1, 0.1};  };
    };
    AnyRefNode DriveNodeSubtalar = {
     sRel = .SubTalarJoint.sRel;
     ARel = .SubTalarJoint.ARel;
     //ARel = RotMat(sRel,sRel+{0,0,1}*.AnkleJoint.ARel', ..RightFootRef.MorphNodes.SourceToeMarker.sRel);
     AnyDrawRefFrame refFrame = { Visible = Off; RGB={0,1,0}; ScaleXYZ = {0.1, 0.1, 0.1};  };
    };
  };

  RightFootRef  = {
    AnyRefNode DriveNodeSubtalar = {
      sRel = .SubTalarJoint.sRel;
      ARel = .SubTalarJoint.ARel;
     AnyDrawRefFrame refFrame = { Visible = Off; RGB={1,0,0}; ScaleXYZ = {0.1, 0.1, 0.1};  };
    };
    SubTalarJoint = {
     AnyRefNode DriveNode = {
       //ARel = RotMat(pi/2,y);
     //  AnyDrawRefFrame refFrame = { Visible = On; RGB={1,0,0}; ScaleXYZ = {0.05, 0.05, 0.05};  };
     };
    };
//    AnyRefNode SubTalarDriveNode = {
//      sRel = .SubTalarJoint.sRel;
//      ARel = RotMat(sRel, sRel + (.SubTalarJoint.ARel*{0,0,1}')',
//      .MorphNodes.SourceLateralFootMarker.sRel)*RotMat(pi/2,y);
//    };
  };
  #endif

#if LEFT_LEG_TD == 1
  LeftThighRef = {
    AnyRefNode DriveNode = {

      sRel = .HipJoint.sRel;
      ARel = RotMat(.HipJoint.sRel,
                    .KneeJoint.sRel ,
                    .HipJoint.sRel + (-1)*.KneeJoint.ARel'[2]  );
    };

    AnyRefNode DriveNodeKnee = {
     sRel = .KneeJoint.sRel;
     ARel = RotMat(sRel,sRel+{0,0,1}*.KneeJoint.ARel', .HipJoint.sRel)
     * RotMat(90*pi/180,y);
//     AnyDrawRefFrame drw ={RGB={0,0,1};};

   };

  };

  LeftShankRef = {
    AnyRefNode DriveNodeAnkle = {
      sRel = .AnkleJoint.sRel;
     ARel = .AnkleJoint.ARel;//RotMat(sRel,sRel+{0,0,1}*.AnkleJoint.ARel', .KneeJoint.sRel);
     //AnyDrawRefFrame drw ={};

    };

     AnyRefNode DriveNodeKnee = {
     sRel = .KneeJoint.sRel;
     ARel = RotMat(sRel,sRel+{0,0,1}*.KneeJoint.ARel', .AnkleJoint.sRel)
     * RotMat(90*pi/180,y)*RotMat(pi,z);
//     AnyDrawRefFrame drw ={RGB={1,0,0};};

   };


  };

  LeftTalusRef = {
    AnyRefNode DriveNodeAnkle = {
     sRel = .AnkleJoint.sRel;
     ARel = .AnkleJoint.ARel;
     //ARel = RotMat(sRel,sRel+{0,0,1}*.AnkleJoint.ARel', ..RightFootRef.MorphNodes.SourceToeMarker.sRel);
     AnyDrawRefFrame refFrame = { Visible = Off; RGB={0,1,0}; ScaleXYZ = {0.1, 0.1, 0.1};  };
    };
    AnyRefNode DriveNodeSubtalar = {
     sRel = .SubTalarJoint.sRel;
     ARel = .SubTalarJoint.ARel;
     //ARel = RotMat(sRel,sRel+{0,0,1}*.AnkleJoint.ARel', ..RightFootRef.MorphNodes.SourceToeMarker.sRel);
     AnyDrawRefFrame refFrame = { Visible = Off; RGB={0,1,0}; ScaleXYZ = {0.1, 0.1, 0.1};  };
    };
  };

  LeftFootRef  = {
    AnyRefNode DriveNodeSubtalar = {
      sRel = .SubTalarJoint.sRel;
      ARel = .SubTalarJoint.ARel;
     AnyDrawRefFrame refFrame = { Visible = Off; RGB={1,0,0}; ScaleXYZ = {0.1, 0.1, 0.1};  };
    };
    SubTalarJoint = {
     AnyRefNode DriveNode = {
       //ARel = RotMat(pi/2,y);
       //AnyDrawRefFrame refFrame = { Visible = On; RGB={1,0,0}; ScaleXYZ = {0.05, 0.05, 0.05};  };
     };
    };
//    AnyRefNode SubTalarDriveNode = {
//      sRel = .SubTalarJoint.sRel;
//      ARel = RotMat(sRel, sRel + (.SubTalarJoint.ARel*{0,0,1}')',
//      .MorphNodes.SourceLateralFootMarker.sRel)*RotMat(pi/2,y);
//    };
  };
#endif

  // Insert a new driveNode in the interface folder
  AnyFolder &InterfaceRef = ...HumanModel.BodyModel.Interface;
  InterfaceRef = {

    Trunk = {
    // Maal forhold til global refframe...
      AnyKinMeasureOrg PelvisDriveNodePosX = {
        AnyKinLinear DriveNodeLin = {
          AnyRefFrame &DriveNode = ....PelvisRef.DriveNode;
        };
        MeasureOrganizer={0};
      };
      AnyKinMeasureOrg PelvisDriveNodePosY = {
        AnyKinLinear &DriveNodeLin = .PelvisDriveNodePosX.DriveNodeLin;
        MeasureOrganizer={1};
      };
      AnyKinMeasureOrg PelvisDriveNodePosZ = {
        AnyKinLinear &DriveNodeLin = .PelvisDriveNodePosX.DriveNodeLin;
        MeasureOrganizer={2};
      };

      AnyKinMeasureOrg PelvisDriveNodeRot0 = {
        AnyKinRotational DriveNodeRot = {
          Type = RotAxesAngles;
          AnyRefFrame &DriveNode = ....PelvisRef.DriveNode;
        };
        MeasureOrganizer={0};
      };
      AnyKinMeasureOrg PelvisDriveNodeRot1 = {
        AnyKinRotational &DriveNodeRot = .PelvisDriveNodeRot0.DriveNodeRot;
        MeasureOrganizer={1};
      };
      AnyKinMeasureOrg PelvisDriveNodeRot2 = {
        AnyKinRotational &DriveNodeRot = .PelvisDriveNodeRot0.DriveNodeRot;
        MeasureOrganizer={2};
      };
    };


    #if RIGHT_LEG_TD == 1
    Right = {

      AnyKinMeasureOrg HipJointMeasure0 = {
        AnyKinRotational HipMeasure ={
          // Two reference frames form pelvis and thigh is used to
          // calculate the angles
          AnyRefNode &PelvisNode = ....PelvisRef.DriveNode;
          AnyRefNode &KneeNode = ....RightThighRef.DriveNode;

          Type=RotAxesAngles;
        };
        MeasureOrganizer={0};
      };

      AnyKinMeasureOrg HipJointMeasure1 = {
        AnyKinRotational &HipMeasure =.HipJointMeasure0.HipMeasure;
        MeasureOrganizer={1};
      };
      AnyKinMeasureOrg HipJointMeasure2 ={
        AnyKinRotational &HipMeasure =.HipJointMeasure0.HipMeasure;
        MeasureOrganizer={2};
      };

      #ifndef SPHERICAL_KNEE_JOINT
      AnyKinMeasureOrg KneeJointMeasure = {
         AnyKinRotational KneeRot ={
           AnyRefNode &KneeRef1 = ....RightThighRef.KneeJoint;
           AnyRefNode &KneeRef2 = ....RightShankRef.KneeJoint;
           Type=RotAxesAngles;
         };
        MeasureOrganizer={0};
      };
      #else
      AnyKinMeasureOrg KneeJointMeasure = {
         AnyKinRotational KneeRot ={
           AnyRefNode &KneeRef1 = ....RightThighRef.DriveNodeKnee;
           AnyRefNode &KneeRef2 = ....RightShankRef.DriveNodeKnee;
           Type=RotAxesAngles;
         };
      };
      #endif

      AnyKinMeasureOrg AnkleJointDriveMeasure = {
         AnyKinRotational AnkleRot ={
           AnyRefNode &Ref1 = ....RightShankRef.AnkleJoint;
           AnyRefNode &Ref2 = ....RightTalusRef.AnkleJoint;
           Type=RotAxesAngles;
           //Ref1 = {AnyDrawRefFrame drw ={RGB={1,0,0};};};
           //Ref2 = {AnyDrawRefFrame drw ={};};
         };
        MeasureOrganizer={0};
      };

      AnyKinMeasureOrg SubtalarJointDriveMeasure = {
         AnyKinRotational TalusRot ={
           AnyRefNode &Ref1 = ....RightTalusRef.SubTalarJoint;
           AnyRefNode &Ref2 = ....RightFootRef.SubTalarJoint;
//           AnyRefNode &KneeRef1 = ....RightTalusRef.SubTalarDriveNode;
//           AnyRefNode &KneeRef2 = ....RightFootRef.SubTalarDriveNode;
          Type=RotAxesAngles;
         };
        MeasureOrganizer={0};
      };

    };
    #endif

    #if LEFT_LEG_TD == 1
    Left = {

      AnyKinMeasureOrg HipJointMeasure0 = {
        AnyKinRotational HipMeasure ={
          // Two reference frames form pelvis and thigh is used to
          // calculate the angles
          AnyRefNode &PelvisNode = ....PelvisRef.DriveNode;
          AnyRefNode &KneeNode = ....LeftThighRef.DriveNode;

          Type=RotAxesAngles;
        };
        MeasureOrganizer={0};
      };

      AnyKinMeasureOrg HipJointMeasure1 = {
        AnyKinRotational &HipMeasure =.HipJointMeasure0.HipMeasure;
        MeasureOrganizer={1};
      };
      AnyKinMeasureOrg HipJointMeasure2 ={
        AnyKinRotational &HipMeasure =.HipJointMeasure0.HipMeasure;
        MeasureOrganizer={2};
      };
      #ifndef SPHERICAL_KNEE_JOINT
      AnyKinMeasureOrg KneeJointMeasure = {
         AnyKinRotational KneeRot ={
           AnyRefNode &KneeRef1 = ....LeftThighRef.KneeJoint;
           AnyRefNode &KneeRef2 = ....LeftShankRef.KneeJoint;
           Type=RotAxesAngles;
         };
        MeasureOrganizer={0};
      };
      #else
     AnyKinMeasureOrg KneeJointMeasure = {
         AnyKinRotational KneeRot ={
           AnyRefNode &KneeRef1 = ....LeftThighRef.DriveNodeKnee;
           AnyRefNode &KneeRef2 = ....LeftShankRef.DriveNodeKnee;
           Type=RotAxesAngles;
         };
      };
      #endif

      AnyKinMeasureOrg AnkleJointDriveMeasure = {
         AnyKinRotational AnkleRot ={
           AnyRefNode &Ref1 = ....LeftShankRef.AnkleJoint;
           AnyRefNode &Ref2 = ....LeftTalusRef.AnkleJoint;
           Type=RotAxesAngles;
         };
        MeasureOrganizer={0};
      };

      AnyKinMeasureOrg SubtalarJointDriveMeasure = {
         AnyKinRotational TalusRot ={
           AnyRefNode &Ref1 = ....LeftTalusRef.SubTalarJoint;
           AnyRefNode &Ref2 = ....LeftFootRef.SubTalarJoint;
//           AnyRefNode &KneeRef1 = ....RightTalusRef.SubTalarDriveNode;
//           AnyRefNode &KneeRef2 = ....RightFootRef.SubTalarDriveNode;
          Type=RotAxesAngles;
         };
        MeasureOrganizer={0};
      };

    };
    #endif

  };
