//This file contains the marker topology of the data set it links free floating markers with the markers on the human

AnyFolder ModelSetup =
{

  AnyInputC3D DynamicDataSet =
  {
    FileName = Main.TrialSpecificData.C3DFileNameDynamic;
    ConstructWeightFunUsingResidualOnOff = Off;
    PointsScaleFactor = 0.001;
    ConstructModelOnOff = On;
    ConstructChartOnOff = Off;
    MarkerUseAllPointsOnOff = On;
    MarkerUseCamMaskOnOff = Off;
    MarkerScaleXYZ = {0.01,0.01,0.01};
    SearchAndReplace = {{".",""}};
    MarkerRGB = {1,0,0};
    //MarkerLabels = {"Sternum","Neck","RShoulder","LShoulder","Xiphoid","Thoracic","RAsis","LAsis","RPsis","LPsis","Lumbar","RElbow","RWrist","RRadius","RUlna","LElbow","LWrist","LUlna","LRadius","LThighSuperior","LThighInferior","LThighLateral","LPatella","LShankSuperior","LShankInferior","LShankLateral","RThighSuperior","RThighInferior","RThighLateral","RPatella","RShankLateral","RShankSuperior","RShankInferior","RHeel","RToe","RMidfootMedial","RMidfootLateral","RHindfoot","RMidfootSuperior","RToeMedial","RToeMedial","RToeLateral","LHeel","LToe","LMidfootMedial","LMidfootLateral","LHindfoot","LMidfootSuperior","LToeMedial","LToeLateral","LShoulderCenter","Sacral"};
    Filter =
    {
      AutomaticInitialConditionOnOff = On;
      FilterForwardBackwardOnOff = On;
      N = 2;
      Fc = {20};
      Type = LowPass;
    };

    AnalogFilterIndex = 1;

    //This filter is used for the analog data
    AnyFunButterworthFilter LowPassFilter =
    {
      FilterForwardBackwardOnOff = On;
      AutomaticInitialConditionOnOff = On;
      N = 2;
      AnyVar CutOffFrequency=20;

      AnyVar SampleFreq=1000;
      //AnyVar SampleFreq=.Header.VideoFrameRate;
      //AnyVar SampleFreq=.Header.VideoFrameRate* .Header.NoAnalogSamplesPer3DFrame   ;

      W = {1/(SampleFreq*0.5)*CutOffFrequency};
      Type = LowPass;
    }; // LowPassFilter
  }; // DynamicDataSet

  AnyInputC3D StaticData =
  {
    FileName =  Main.SubjectSpecificData.C3DFileNameStatic;
    PointsScaleFactor = 0.001;
    ConstructModelOnOff = Off;
    ConstructChartOnOff = Off;
    MarkerScaleXYZ = {0.01,0.01,0.01};
    MarkerRGB = {0,1,0};
    MarkerUseAllPointsOnOff = On;
    MarkerUseCamMaskOnOff = Off;
    SearchAndReplace = {{".",""}};

    #ifdef FIX_FOR_PARAMETER_OPT_BUG
      MarkerInterPolType = PieceWiseLinear;
    #endif

  }; // StaticData

  #ifndef USE_TRIAL_SPECIFIC_TIMES
    AnyIntVar LastFrame = Main.ModelSetup.DynamicDataSet.Header.LastFrameNo-1;
    AnyIntVar FirstFrame = Main.ModelSetup.DynamicDataSet.Header.FirstFrameNo+1;
    AnyIntVar nStep = LastFrame - FirstFrame; // example: 10 frames Ref results in 7 frames Anybody data output
  #else
    AnyIntVar LastFrame = Main.TrialSpecificData.LastFrameNo-1;
    AnyIntVar FirstFrame = Main.TrialSpecificData.StartFrameNo+1;
    AnyIntVar nStep = LastFrame - FirstFrame + 1;
  #endif

  AnyFloatVar  tStart = FirstFrame/Main.ModelSetup.DynamicDataSet.Header.VideoFrameRate;
  AnyFloatVar  tEnd = LastFrame /Main.ModelSetup.DynamicDataSet.Header.VideoFrameRate;

  AnyFolder Files =
  {
    //AnyStringVar RightHipParameters = TEMP_FILE_PATH + "/" + Main.SubjectSpecificData.RightHipParametersTrial + "_OptimizedParameters.txt";
    //AnyStringVar LeftHipParameters = TEMP_FILE_PATH + "/" + Main.SubjectSpecificData.LeftHipParametersTrial + "_OptimizedParameters.txt";
    //AnyStringVar LeftAnkleParameters = TEMP_FILE_PATH + "/" + Main.SubjectSpecificData.LeftAnkleParametersTrial + "_OptimizedParameters.txt";
    //AnyStringVar RightAnkleParameters = TEMP_FILE_PATH + "/" + Main.SubjectSpecificData.RightAnkleParametersTrial + "_OptimizedParameters.txt";
    //AnyStringVar LeftKneeParameters = TEMP_FILE_PATH + "/" + Main.SubjectSpecificData.LeftKneeParametersTrial + "_OptimizedParameters.txt";
    //AnyStringVar RightKneeParameters = TEMP_FILE_PATH + "/" + Main.SubjectSpecificData.RightKneeParametersTrial + "_OptimizedParameters.txt";
    //AnyStringVar MultiJointParameters = TEMP_FILE_PATH + "/" + Main.SubjectSpecificData.MultiJointParametersTrial + "_OptimizedParameters.txt";
    //AnyStringVar AllParameters = TEMP_FILE_PATH + "/" + Main.TrialSpecificData.TrialName + "_OptimizedParameters.txt";

    #ifdef TRUNK_DRIVER_FILE
     AnyFileVar OptimizedMotionTrunk = TRUNK_DRIVER_FILE;
    #else
      AnyFileVar OptimizedMotionTrunk = TEMP_FILE_PATH + "/" + Main.TrialSpecificData.TrialName + "-output-euler-trunk.txt";
    #endif

    #ifdef LLEG_DRIVER_FILE
     AnyFileVar OptimizedMotionLeftLegTD = LLEG_DRIVER_FILE;
    #else
      AnyFileVar OptimizedMotionLeftLegTD = TEMP_FILE_PATH + "/" + Main.TrialSpecificData.TrialName + "-output-euler-left_leg_td.txt";
    #endif

    #ifdef RLEG_DRIVER_FILE
     AnyFileVar OptimizedMotionRightLegTD = RLEG_DRIVER_FILE;
    #else
      AnyFileVar OptimizedMotionRightLegTD = TEMP_FILE_PATH  + "/" + Main.TrialSpecificData.TrialName + "-output-euler-right_leg_td.txt";
    #endif

    AnyFileVar  AnkleJointParameters = TEMP_FILE_PATH + "/" + Main.SubjectSpecificData.TrialNameStatic + "_Ankle_Joint_Parameters.anyset";

    // Testing Output files 21.01.2019
    #ifdef LARM_DRIVER_FILE
      AnyFileVar OptimizedMotionLeftArm = LARM_DRIVER_FILE;
    #else
      AnyFileVar OptimizedMotionLeftArm = TEMP_FILE_PATH  + "/" + Main.TrialSpecificData.TrialName + "-output-euler-left_arm.txt";
    #endif // LARM_DRIVER_FILE

    #ifdef RARM_DRIVER_FILE
      AnyFileVar OptimizedMotionRightArm = RARM_DRIVER_FILE;
    #else
      AnyFileVar OptimizedMotionRightArm = TEMP_FILE_PATH  + "/" + Main.TrialSpecificData.TrialName + "-output-euler-right_arm.txt";
    #endif // LARM_DRIVER_FILE
	}; // Files

  //#include "FootContactPythonFunctions.any"

}; // ModelSetup
